# Задание №1
f(x) := 2*sin(3*x) + e^x - 5  # Заданная функция
x1 := root(f(x), x, -10, 10) = 1.84802
# Нахождение корней уравнения
f(x) solve → 1.84802407202
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# График функции f(x) на промежутке [-10,10]
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# График функции f(x) на промежутке [x-0.5,x1+0.5]
