# Задание №2
n := 10
i := 1, 2 .. 2*n
X[i] := 2*π*i/(2*n + 1)
# Кусочно-линейная интерполяция
scale := 100
j := 0 .. scale
t[j] := min(X) + j*(max(X) - min(X))/scale
Y := [1.0; 7.8; 51.5; 238.1; 675.9; 1075.4; 920.1; 429.3; 110.8; 20.8; 2.83; 0.35; 0.04; 0.01; 0.002; 0.001; 0.001; 0.001; 0.004; 0.02; 0.12]
X = [0; 0.299199; 0.598399; 0.897598; 1.1968; 1.496; 1.7952; 2.0944; 2.39359; 2.69279; 2.99199; 3.29119; 3.59039; 3.88959; 4.18879; 4.48799; 4.78719; 5.08639; 5.38559; 5.68479; 5.98399]
fintl(t) := linterp(X, Y, t)
# Интерполяция кубическим слайном
S := cspline(X, Y)
fints(t) := interp(S, X, Y, t)
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