# Задание №3
# Исходная матрица | Вектор-столбец свободных членов
A := [4.25, 3.84, 3.43; 3.86, 3.34, 2.87; 5.40, 4.82, 4.30]
B := [86.07; 77.12; 108.97]
# Решение СЛАУ
X := A^-1*B = [14.3566; 5.82645; 0.781621]
lsolve(A, B) = [14.3566; 5.82645; 0.781621]
Given
x := 0
y := 0
z := 0
4.25*x + 3.84*y + 3.43*z == 86.07
3.86*x + 3.34*y + 2.87*z == 77.12
5.40*x + 4.82*y + 4.30*z == 108.97
res := Find(x, y, z)
res = [14.3566; 5.82645; 0.781621]
