# Задание №4
# Функция вывода матрицы:
K(N) :=
    n ← N
    value ← 1
    x ← 0
    y ← 0
    dx ← 0
    dy ← -1
    for i ∈ 0 .. (n^2 - 1)
        if (-n/2 ≤ x) and (x ≤ n/2) and (-n/2 ≤ y) and (y ≤ n/2)
            A[floor(y + n/2), floor(x + n/2)] ← i + 1
            value ← value + 1
        if (x == y) or ((x < 0) and (x == -y)) or ((x > 0) and (x == (1 - y)))
            temp ← dx
            dx ← -dy
            dy ← temp
        x ← x + dx
        y ← y + dy
    A
# Матрица:
K(9) = [
    73, 74, 75, 76, 77, 78, 79, 80, 81;
    72, 43, 44, 45, 46, 47, 48, 49, 50;
    71, 42, 21, 22, 23, 24, 25, 26, 51;
    70, 41, 20, 7, 8, 9, 10, 27, 52;
    69, 40, 19, 6, 1, 2, 11, 28, 53;
    68, 39, 18, 5, 4, 3, 12, 29, 54;
    67, 38, 17, 16, 15, 14, 13, 30, 55;
    66, 37, 36, 35, 34, 33, 32, 31, 56;
    65, 64, 63, 62, 61, 60, 59, 58, 57
]
# Функция подсчета чисел на диагоналях:
G(N) :=
    M ← K(N + 1)
    n ← N + 1
    dSum1 ← 0
    dSum2 ← 0
    diagonalSum ← 0
    for i ∈ 1 .. n - 1
        dSum1 ← dSum1 + M[i, i]
        dSum2 ← dSum2 + M[i, n - i - 1]
    diagonalSum ← dSum1 + dSum2
    diagonalSum
# Сумма чисел на диагоналях:
G(1001) = 669171001
